*HEADING
Unconstrained C3D8 tangent comparison: distorted
*NODE
1, 0, 0, 0
2, 1, 0, 0
3, 1, 1, 0
4, 0, 1, 0
5, -0.040000000000000001, 0.029999999999999999, 1.02
6, 1, 0, 1
7, 1.1799999999999999, 0.92000000000000004, 1.1200000000000001
8, 0, 1, 1
*ELEMENT, TYPE=C3D8, ELSET=SOLID
1, 1, 2, 3, 4, 5, 6, 7, 8
*MATERIAL, NAME=BASE
*ELASTIC
10, 0.29999999999999999
*SOLID SECTION, ELSET=SOLID, MATERIAL=BASE
,
*STEP, NAME=STIFFNESS
*MATRIX GENERATE, STIFFNESS
*MATRIX OUTPUT, STIFFNESS, FORMAT=MATRIX INPUT
*END STEP
