*Heading
r39 exact cylindrical plane-strain patch; concentrated mid-surface ring load
*Node
1, 2.25, 0
2, 2.375, 0
3, 2.375, 0.3125
4, 2.25, 0.3125
5, 2.3125, 0
6, 2.375, 0.15625
7, 2.3125, 0.3125
8, 2.25, 0.15625
9, 2.5, 0
10, 2.5, 0.3125
11, 2.4375, 0
12, 2.5, 0.15625
13, 2.4375, 0.3125
14, 2.625, 0
15, 2.625, 0.3125
16, 2.5625, 0
17, 2.625, 0.15625
18, 2.5625, 0.3125
19, 2.75, 0
20, 2.75, 0.3125
21, 2.6875, 0
22, 2.75, 0.15625
23, 2.6875, 0.3125
1000001, 2.5, 0.
*Element, type=CAX8, elset=SOLID
1, 1, 2, 3, 4, 5, 6, 7, 8
2, 2, 9, 10, 3, 11, 12, 13, 6
3, 9, 14, 15, 10, 16, 17, 18, 12
4, 14, 19, 20, 15, 21, 22, 23, 17
*Nset, nset=PHYSICAL
1, 2, 3, 4, 5, 6, 7, 8, 9, 10, 11, 12, 13, 14, 15, 16
17, 18, 19, 20, 21, 22, 23
*Material, name=INITIAL
*Elastic
10., 0.3
*Solid Section, elset=SOLID, material=INITIAL
,
*Equation
2
8, 1, 1, 1, 1, -1
*Equation
2
4, 1, 1, 1, 1, -1
*Equation
2
7, 1, 1, 5, 1, -1
*Equation
2
6, 1, 1, 2, 1, -1
*Equation
2
3, 1, 1, 2, 1, -1
*Equation
2
13, 1, 1, 11, 1, -1
*Equation
2
9, 1, 1, 1000001, 1, -1
*Equation
2
12, 1, 1, 1000001, 1, -1
*Equation
2
10, 1, 1, 1000001, 1, -1
*Equation
2
18, 1, 1, 16, 1, -1
*Equation
2
17, 1, 1, 14, 1, -1
*Equation
2
15, 1, 1, 14, 1, -1
*Equation
2
23, 1, 1, 21, 1, -1
*Equation
2
22, 1, 1, 19, 1, -1
*Equation
2
20, 1, 1, 19, 1, -1
*Boundary
PHYSICAL, 2, 2, 0.
1000001, 2, 2, 0.
*Step, name=INITIAL, nlgeom=NO
*Static
1., 1.
*Cload
1000001, 1, 0.0001
*Output, field
*Node Output
U, RF
*Element Output
S, E
*Output, history
*Energy Output
ALLSE, ALLIE, ALLAE, ALLWK
*End Step
