*Heading
r27 small initial-tangent pure-moment plate strip
*Node
1, 0, 0, 1.25
2, 0, 0.15625, 1.25
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*Element, type=S4R, elset=PLATE
1, 1, 10, 11, 2
2, 2, 11, 12, 3
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*Nset, nset=ROOT
1, 2, 3, 4, 5, 6, 7, 8, 9
*Nset, nset=TIP
577, 578, 579, 580, 581, 582, 583, 584, 585
*Material, name=INITIAL_NH_TANGENT
*Elastic
10., 0.3
*Shell Section, elset=PLATE, material=INITIAL_NH_TANGENT
0.5, 5
*Boundary
ROOT, 1, 6, 0.
*Step, name=SMALL_BENDING, nlgeom=NO
*Static
1., 1.
*Cload
577, 5, 6.25e-06
578, 5, 1.25e-05
579, 5, 1.25e-05
580, 5, 1.25e-05
581, 5, 1.25e-05
582, 5, 1.25e-05
583, 5, 1.25e-05
584, 5, 1.25e-05
585, 5, 6.25e-06
*Output, field
*Node Output
U, UR, RF, RM
*Element Output
S, E
*Output, history
*Energy Output
ALLSE, ALLIE, ALLAE, ALLWK
*End Step
